VAX := READPRN("\circuit1.DNO")
VAX = [
    0, 0;
    0.199258, 0.0007025;
    0.379071, 0.0208531;
    0.466991, 0.132916;
    0.500941, 0.298958;
    0.520596, 0.4793;
    0.534773, 0.66512;
    0.546135, 0.853756;
    0.555774, 1.04411;
    0.564237, 1.23565
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]
VAX[:, 0] = [
    0; 0.199258; 0.379071; 0.466991; 0.500941; 0.520596; 0.534773; 0.546135; 0.555774; 0.564237
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]
VAX[:, 1] = [
    0; 0.0007025; 0.0208531; 0.132916; 0.298958; 0.4793; 0.66512; 0.853756; 1.04411; 1.23565
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]
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Id3 := max(VAX[:, 1])
Id3 = 9.29053
Ud3 := VAX[:, 0][50]
nMax := match(Id3, VAX[:, 1])
Ud3 = 0.709331
nMax = [50]
Ud1 := linterp(VAX[:, 1], VAX[:, 0], Id3/2)
Ud1 = 0.647761
Id1 := Id3/2
Id1 = 4.64526
Ud4 := linterp(VAX[:, 1], VAX[:, 0], Id3/3)
Ud4 = 0.618458
Id4 := Id3/3
Id4 = 3.09684
Ud2 := linterp(VAX[:, 1], VAX[:, 0], Id3/4)
Ud2 = 0.599828
Id2 := Id3/4
Id2 = 2.32263
Rb := (Ud1 - 2*Ud2 + Ud3)/Id1
Rb = 0.0338918
NFt := ((3*Ud2 - 2*Ud1) - Ud3)/ln(2)
NFt = -0.296285
Is0 := Id1*exp(-1/NFt*(2*Ud1 - Ud3))
Is0 = 33.5929
x := 10^-0
Rb := 1
IS := 1*10^-10
m := 2
Ft := 0.026
F(x) := x*Rb + ln((IS + x)/IS)*m*Ft
F(x) = 2.19734
Given
0.709 == 9.291*Rb + ln((IS + 9.291)/IS)*m*Ft
0.648 == 4.645*Rb + ln((IS + 4.645)/IS)*m*Ft
0.618 == 3.097*Rb + ln((IS + 3.097)/IS)*m*Ft
0.6 == 2.323*Rb + ln((IS + 2.323)/IS)*m*Ft
Diod_P := Minerr(IS, Rb, m, Ft)
Diod_P = [1.07266e-5; 0.00618299; 4.62517; 0.0103061]
Diod_P[0] = 1.07266e-5
Diod_P[1] = 0.00618299
Diod_P[2] = 4.62517
Diod_P[3] = 0.0103061
Id := 9.291
F(Id) := Id*Diod_P[1] + ln((Diod_P[0] + Id)/Diod_P[0])*(Diod_P[2]*Diod_P[3])
F(Id) = 0.709151
Rb := 1
NFt := 0.0255
Is0 := 10^-14
Idiod := 0, 10^-5 .. 0.023
Idiod =  # no stored result
Udiod(Idiod) := Idiod*Rb + NFt*ln((Idiod + Is0)/Is0)
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Rb1 := 1.2
NFt1 := 0.0255
Is01 := 22.7*10^6
Idiod := 0, 10^-5 .. 0.023
Uformula(Idiod) := Idiod*Rb1 + NFt1*ln((Idiod + Is01)/Is01)
VAX := READPRN("\circuit1.DNO")
Idiod := VAX[:, 1]
VAX[:, 0] = [
    0; 0.199258; 0.379071; 0.466991; 0.500941; 0.520596; 0.534773; 0.546135; 0.555774; 0.564237
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]
VAX[:, 1] = [
    0; 0.0007025; 0.0208531; 0.132916; 0.298958; 0.4793; 0.66512; 0.853756; 1.04411; 1.23565
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]
Idiod = [
    0; 0.0007025; 0.0208531; 0.132916; 0.298958; 0.4793; 0.66512; 0.853756; 1.04411; 1.23565
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]
VAX[:, 0][45] = 0.698053
Iproverka := VAX[:, 1][45]
VAX[:, 1][45] = 8.30181
Uformula(Iproverka) = 9.96217
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